# Esta simulación utiliza el robot ABB_IRB120.xml de RoKiSim
DOF := 6
art := 0 .. DOF - 1
θini := [0; 0; 0; 0; 0; 0]
# Posición inicial:
# TCP = 475.785 mm, -82.198 mm, 628.840 mm
θfin := [0.00; 39.93; 38.59; 0.00; -78.52; 0.00]
# Posición final:
# TCP = 475.785 mm, -82.198 mm, 213.840 mm
# Número de posiciones:
n := 200
i := 0 .. n
M[i, art] := (θfin[art] - θini[art])/n*i + θini[art]  # Recorrido de ida
M[n + i + 1, art] := M[n - i, art]  # Recorrido de regreso
# [component: inputs M]
